*Heading
File generated by TexGen v3.12.2
************
*** MESH ***
************
*Node
1, -4.44089e-16, 0.880423, 0.125285
2, -4.44089e-16, 0.823607, 0.11365
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*Element, Type=C3D6
1, 30, 40, 39, 1, 11, 10
2, 38, 49, 48, 9, 20, 19
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*Element, Type=C3D8R
609, 30, 31, 41, 40, 1, 2, 12, 11
610, 31, 32, 42, 41, 2, 3, 13, 12
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********************
*** ORIENTATIONS ***
********************
** Orientation vectors
** 1st vector represents the fibre direction
** 2nd vector is an arbitrary vector perpendicular to the first
*Distribution Table, Name=TexGenOrientationVectors
COORD3D,COORD3D
*Distribution, Location=Element, Table=TexGenOrientationVectors, Name=TexGenOrientationVectors, Input=DryFibreULSurfaceTest.ori
*Orientation, Name=TexGenOrientations, Definition=coordinates
TexGenOrientationVectors
1, 0
********************
*** ELEMENT SETS ***
********************
** TexGen generates a number of element sets:
** All - Contains all elements
** Matrix - Contains all elements belonging to the matrix
** YarnX - Where X represents the yarn index
*ElSet, ElSet=All, Generate
1, 3040, 1
*ElSet, ElSet=Yarn0
1, 2, 3, 4, 5, 6
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*ElSet, ElSet=Yarn1
97, 98, 99, 100, 101, 102
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*ElSet, ElSet=Yarn2
305, 306, 307, 308, 309, 310
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*ElSet, ElSet=Yarn3
381, 382, 383, 384, 385, 386
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*ElSet, ElSet=Yarn4
457, 458, 459, 460, 461, 462
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*ElSet, ElSet=Yarn5
533, 534, 535, 536, 537, 538
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*****************
*** MATERIALS ***
*****************
*Material, Name=Mat0
*Elastic
3e+09, 0.2
*Damping, alpha= 3.75e+6
*Density
1.37e-09,
*DepVar
5
*Material, Name=Mat1
*Elastic, type=ENGINEERING CONSTANTS
2e+11, 1e+10, 1e+10, 0.3, 0.4, 0.4, 5e+09, 5e+09
5e+09
*Damping, alpha= 3.75e+6
*Density
1.37e-09,
*DepVar
5
*Solid Section, ElSet=Yarn0, Material=Mat1, Orientation=TexGenOrientations, controls=HourglassEnhanced
1.0,
*Solid Section, ElSet=Yarn1, Material=Mat1, Orientation=TexGenOrientations, controls=HourglassEnhanced
1.0,
*Solid Section, ElSet=Yarn2, Material=Mat1, Orientation=TexGenOrientations, controls=HourglassEnhanced
1.0,
*Solid Section, ElSet=Yarn3, Material=Mat1, Orientation=TexGenOrientations, controls=HourglassEnhanced
1.0,
*Solid Section, ElSet=Yarn4, Material=Mat1, Orientation=TexGenOrientations, controls=HourglassEnhanced
1.0,
*Solid Section, ElSet=Yarn5, Material=Mat1, Orientation=TexGenOrientations, controls=HourglassEnhanced
1.0,
*Section Controls, Name=HourglassEnhanced, Hourglass=Enhanced, SECOND ORDER ACCURACY=YES
** Note: Additional element data are stored as a depvars:
********************
*** ELEMENT DATA ***
********************
** Element data stored as a depvars
** 1 - Element index
** 2 - Yarn Index (-1 for matrix, first yarn starting at 0)
** 3/4 - Location (x and y cross-section coordinates of element relative to yarn centerline)
** 5 - Volume fraction
** 6 - Distance of element from the surface of the yarn (for yarn elements only, distance is negative)
*Initial Conditions, Type=Solution, Input=DryFibreULSurfaceTest.eld
***************************
*** SURFACE DEFINITIONS ***
***************************
*Surface, Name=Yarn0Lower, Type=Element
609, S3
610, S3
611, S3
612, S3
613, S3
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94, S3
*Surface, Name=Yarn0Upper, Type=Element
617, S5
618, S5
619, S5
620, S5
621, S5
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96, S4
*Surface, Name=Yarn1Lower, Type=Element
993, S3
994, S3
995, S3
996, S3
1005, S3
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302, S3
*Surface, Name=Yarn1Upper, Type=Element
997, S5
998, S5
999, S5
1000, S5
1001, S5
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304, S4
*Surface, Name=Yarn2Lower, Type=Element
1825, S3
1826, S3
1827, S3
1828, S3
1829, S3
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378, S3
*Surface, Name=Yarn2Upper, Type=Element
1833, S5
1834, S5
1835, S5
1836, S5
1837, S5
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380, S4
*Surface, Name=Yarn3Lower, Type=Element
2129, S3
2130, S3
2131, S3
2132, S3
2133, S3
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454, S3
*Surface, Name=Yarn3Upper, Type=Element
2137, S5
2138, S5
2139, S5
2140, S5
2141, S5
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456, S4
*Surface, Name=Yarn4Lower, Type=Element
2433, S3
2434, S3
2435, S3
2436, S3
2437, S3
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530, S3
*Surface, Name=Yarn4Upper, Type=Element
2441, S5
2442, S5
2443, S5
2444, S5
2445, S5
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532, S4
*Surface, Name=Yarn5Lower, Type=Element
2737, S3
2738, S3
2739, S3
2740, S3
2741, S3
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606, S3
*Surface, Name=Yarn5Upper, Type=Element
2745, S5
2746, S5
2747, S5
2748, S5
2749, S5
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608, S4
************************************
*** PERIODIC BOUNDARY CONDITIONS ***
************************************
*NSet, NSet=Bound0A, Unsorted
1, 2, 3, 4, 5, 6
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*NSet, NSet=Bound0B, Unsorted
697, 698, 699, 700, 701, 702
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*Node
4590, 0, 0, 0
*NSet, NSet=Dummy0
4590
*Equation
3
Bound0A, 1, 1.0, Bound0B, 1, -1.0, Dummy0, 1, 1.0
*Equation
3
Bound0A, 2, 1.0, Bound0B, 2, -1.0, Dummy0, 2, 1.0
*Equation
3
Bound0A, 3, 1.0, Bound0B, 3, -1.0, Dummy0, 3, 1.0
*NSet, NSet=Bound1A, Unsorted
2270, 2271, 2272, 2273, 2274, 2275
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*NSet, NSet=Bound1B, Unsorted
2821, 2822, 2823, 2824, 2825, 2826
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*Node
4591, 0, 0, 0
*NSet, NSet=Dummy1
4591
*Equation
3
Bound1A, 1, 1.0, Bound1B, 1, -1.0, Dummy1, 1, 1.0
*Equation
3
Bound1A, 2, 1.0, Bound1B, 2, -1.0, Dummy1, 2, 1.0
*Equation
3
Bound1A, 3, 1.0, Bound1B, 3, -1.0, Dummy1, 3, 1.0
*** Nodes containing domain AABB ***
*Node
4592, -0.0221276, 0.0105263, -0.0499952
4593, 2.02179, 1.56053, 0.349995
*NSet, NSet=Domain
4592, 4593
************
*** INTERACTION PROPERTIES ***
************
*Surface Interaction, name=YARN
*Friction
0.112,
*Surface Behavior, pressure-overclosure=HARD
************
*** STEP ***
************
*Step, NLGeom=Yes
*Dynamic, Explicit
,2.5e-5
*Bulk Viscosity
0.06, 1.2
***************************
*** CONTACT DEFINITIONS ***
***************************
*** WARNING: Contacts are only created for upper and lower surfaces.
***          Any contacts between binder yarns and sides of warp and weft
***          yarns must be specified manually
*Contact Pair, Interaction=Yarn
Yarn0Upper, Yarn3Lower
*Contact Pair, Interaction=Yarn
Yarn0Upper, Yarn5Lower
*Contact Pair, Interaction=Yarn
Yarn1Upper, Yarn2Lower
*Contact Pair, Interaction=Yarn
Yarn2Upper, Yarn0Lower
*Contact Pair, Interaction=Yarn
Yarn4Upper, Yarn0Lower
*Contact Pair, Interaction=Yarn
Yarn5Upper, Yarn1Lower
*Output, History, Variable=PRESELECT
*Output, Field, Variable=PRESELECT
*Element Output
SDV
*Boundary
*Amplitude, name=Amp-1
0., 0., 2.5e-05, 1.
*Boundary, amplitude=Amp-1
*** Constrain the nodes closest to the geometrical center of each yarns
363, 1, 1, 0
363, 2, 2, 0
363, 3, 3, 0
1491, 1, 1, 0
1491, 2, 2, 0
1491, 3, 3, 0
2574, 1, 1, 0
2574, 2, 2, 0
2574, 3, 3, 0
3154, 1, 1, 0
3154, 2, 2, 0
3154, 3, 3, 0
3734, 1, 1, 0
3734, 2, 2, 0
3734, 3, 3, 0
4314, 1, 1, 0
4314, 2, 2, 0
4314, 3, 3, 0
*** Apply the repeat vector constraints
Dummy0, 1, 1, 0
Dummy0, 2, 2, 0
Dummy0, 3, 3, 0
Dummy1, 1, 1, 0
Dummy1, 2, 2, 0
Dummy1, 3, 3, 0
*End Step
